// SBML level 2 version 4

model combined()

  // Compartments:
  compartment default_compartment = 1;

  // Species:
  species $A_N in default_compartment = 1;
  species $A_AA in default_compartment = 1;
  species A_m1 in default_compartment = 0;
  species A_m2 in default_compartment = 0;
  species A_m3 in default_compartment = 0;
  species p_c1 in default_compartment = 0;
  species A_p2 in default_compartment = 0;
  species A_p_output in default_compartment = 0;
  species $B_N in default_compartment = 1;
  species $B_AA in default_compartment = 1;
  species B_m1 in default_compartment = 0;
  species B_m2 in default_compartment = 0;
  species B_m3 in default_compartment = 0;
  species p_c2 in default_compartment = 0;
  species B_p2 in default_compartment = 0;
  species $C_N in default_compartment = 1;
  species $C_AA in default_compartment = 1;
  species C_m1 in default_compartment = 0;
  species C_m2 in default_compartment = 0;
  species C_m3 in default_compartment = 0;
  species p_c3 in default_compartment = 0;
  species C_p2 in default_compartment = 0;
  species $D_N in default_compartment = 1;
  species $D_AA in default_compartment = 1;
  species D_m1 in default_compartment = 0;
  species D_m2 in default_compartment = 0;
  species D_m3 in default_compartment = 0;
  species p_c4 in default_compartment = 0;
  species D_p2 in default_compartment = 0;
  species $E_N in default_compartment = 1;
  species $E_AA in default_compartment = 1;
  species E_m1 in default_compartment = 0;
  species E_m2 in default_compartment = 0;
  species E_m3 in default_compartment = 0;
  species p_c5 in default_compartment = 0;
  species E_p2 in default_compartment = 0;
  species $F_N in default_compartment = 1;
  species $F_AA in default_compartment = 1;
  species F_m1 in default_compartment = 0;
  species F_m2 in default_compartment = 0;
  species F_m3 in default_compartment = 0;
  species p_c6 in default_compartment = 0;
  species F_p2 in default_compartment = 0;
  species $G_N in default_compartment = 1;
  species $G_AA in default_compartment = 1;
  species G_m1 in default_compartment = 0;
  species G_m2 in default_compartment = 0;
  species G_m3 in default_compartment = 0;
  species p_c7 in default_compartment = 0;
  species G_p2 in default_compartment = 0;
  species $H_N in default_compartment = 1;
  species $H_AA in default_compartment = 1;
  species H_m1 in default_compartment = 0;
  species H_m2 in default_compartment = 0;
  species H_m3 in default_compartment = 0;
  species p_c8 in default_compartment = 0;
  species H_p2 in default_compartment = 0;
  species $I_N in default_compartment = 1;
  species $I_AA in default_compartment = 1;
  species I_m1 in default_compartment = 0;
  species I_m2 in default_compartment = 0;
  species I_m3 in default_compartment = 0;
  species p_c9 in default_compartment = 0;
  species I_p2 in default_compartment = 0;
  species $J_N in default_compartment = 1;
  species $J_AA in default_compartment = 1;
  species J_m1 in default_compartment = 0;
  species J_m2 in default_compartment = 0;
  species J_m3 in default_compartment = 0;
  species J_p_input in default_compartment = 0;
  species J_p2 in default_compartment = 0;

  // Parameters:
  A_Vm_A1 = 10.9863;
  A_K_A1 = 0.6264;
  A_H1 = 1.3631;
  A_Vm_R1 = 17.1312;
  A_K_R1 = 0.4485;
  A_Vm_A2 = 8.8587;
  A_K_A2 = 0.6309;
  A_H2 = 1.0111;
  A_Vm_R2 = 22.5492;
  A_K_R2 = 0.8575;
  B_Vm_A1 = 10.9863;
  B_K_A1 = 0.6264;
  B_H1 = 1.3631;
  B_Vm_R1 = 17.1312;
  B_K_R1 = 0.4485;
  B_Vm_A2 = 8.8587;
  B_K_A2 = 0.6309;
  B_H2 = 1.0111;
  B_Vm_R2 = 22.5492;
  B_K_R2 = 0.8575;
  C_Vm_A1 = 10.9863;
  C_K_A1 = 0.6264;
  C_H1 = 1.3631;
  C_Vm_R1 = 17.1312;
  C_K_R1 = 0.4485;
  C_Vm_A2 = 8.8587;
  C_K_A2 = 0.6309;
  C_H2 = 1.0111;
  C_Vm_R2 = 22.5492;
  C_K_R2 = 0.8575;
  D_Vm_A1 = 10.9863;
  D_K_A1 = 0.6264;
  D_H1 = 1.3631;
  D_Vm_R1 = 17.1312;
  D_K_R1 = 0.4485;
  D_Vm_A2 = 8.8587;
  D_K_A2 = 0.6309;
  D_H2 = 1.0111;
  D_Vm_R2 = 22.5492;
  D_K_R2 = 0.8575;
  E_Vm_A1 = 10.9863;
  E_K_A1 = 0.6264;
  E_H1 = 1.3631;
  E_Vm_R1 = 17.1312;
  E_K_R1 = 0.4485;
  E_Vm_A2 = 8.8587;
  E_K_A2 = 0.6309;
  E_H2 = 1.0111;
  E_Vm_R2 = 22.5492;
  E_K_R2 = 0.8575;
  F_Vm_A1 = 10.9863;
  F_K_A1 = 0.6264;
  F_H1 = 1.3631;
  F_Vm_R1 = 17.1312;
  F_K_R1 = 0.4485;
  F_Vm_A2 = 8.8587;
  F_K_A2 = 0.6309;
  F_H2 = 1.0111;
  F_Vm_R2 = 22.5492;
  F_K_R2 = 0.8575;
  G_Vm_A1 = 10.9863;
  G_K_A1 = 0.6264;
  G_H1 = 1.3631;
  G_Vm_R1 = 17.1312;
  G_K_R1 = 0.4485;
  G_Vm_A2 = 8.8587;
  G_K_A2 = 0.6309;
  G_H2 = 1.0111;
  G_Vm_R2 = 22.5492;
  G_K_R2 = 0.8575;
  H_Vm_A1 = 10.9863;
  H_K_A1 = 0.6264;
  H_H1 = 1.3631;
  H_Vm_R1 = 17.1312;
  H_K_R1 = 0.4485;
  H_Vm_A2 = 8.8587;
  H_K_A2 = 0.6309;
  H_H2 = 1.0111;
  H_Vm_R2 = 22.5492;
  H_K_R2 = 0.8575;
  I_Vm_A1 = 10.9863;
  I_K_A1 = 0.6264;
  I_H1 = 1.3631;
  I_Vm_R1 = 17.1312;
  I_K_R1 = 0.4485;
  I_Vm_A2 = 8.8587;
  I_K_A2 = 0.6309;
  I_H2 = 1.0111;
  I_Vm_R2 = 22.5492;
  I_K_R2 = 0.8575;
  J_Vm_A1 = 10.9863;
  J_K_A1 = 0.6264;
  J_H1 = 1.3631;
  J_Vm_R1 = 17.1312;
  J_K_R1 = 0.4485;
  J_Vm_A2 = 8.8587;
  J_K_A2 = 0.6309;
  J_H2 = 1.0111;
  J_Vm_R2 = 22.5492;
  J_K_R2 = 0.8575;
  A_L1 = 0.0113;
  A_a_m1 = 17.1621;
  A_d_m1 = 0.1456;
  A_L2 = 0.0084;
  A_d_m2 = 0.4408;
  A_L3 = 0.0085;
  A_d_m3 = 0.5637;
  A_a_p1 = 0.6188;
  A_d_p1 = 0.4167;
  A_a_p2 = 0.4375;
  A_d_p2 = 0.3257;
  A_a_p3 = 0.5914;
  A_d_p3 = 0.738;
  B_L1 = 0.0113;
  B_a_m1 = 17.1621;
  B_d_m1 = 0.1456;
  B_L2 = 0.0084;
  B_d_m2 = 0.4408;
  B_L3 = 0.0085;
  B_d_m3 = 0.5637;
  B_a_p1 = 0.6188;
  B_d_p1 = 0.4167;
  B_a_p2 = 0.4375;
  B_d_p2 = 0.3257;
  B_a_p3 = 0.5914;
  B_d_p3 = 0.738;
  C_L1 = 0.0113;
  C_a_m1 = 17.1621;
  C_d_m1 = 0.1456;
  C_L2 = 0.0084;
  C_d_m2 = 0.4408;
  C_L3 = 0.0085;
  C_d_m3 = 0.5637;
  C_a_p1 = 0.6188;
  C_d_p1 = 0.4167;
  C_a_p2 = 0.4375;
  C_d_p2 = 0.3257;
  C_a_p3 = 0.5914;
  C_d_p3 = 0.738;
  D_L1 = 0.0113;
  D_a_m1 = 17.1621;
  D_d_m1 = 0.1456;
  D_L2 = 0.0084;
  D_d_m2 = 0.4408;
  D_L3 = 0.0085;
  D_d_m3 = 0.5637;
  D_a_p1 = 0.6188;
  D_d_p1 = 0.4167;
  D_a_p2 = 0.4375;
  D_d_p2 = 0.3257;
  D_a_p3 = 0.5914;
  D_d_p3 = 0.738;
  E_L1 = 0.0113;
  E_a_m1 = 17.1621;
  E_d_m1 = 0.1456;
  E_L2 = 0.0084;
  E_d_m2 = 0.4408;
  E_L3 = 0.0085;
  E_d_m3 = 0.5637;
  E_a_p1 = 0.6188;
  E_d_p1 = 0.4167;
  E_a_p2 = 0.4375;
  E_d_p2 = 0.3257;
  E_a_p3 = 0.5914;
  E_d_p3 = 0.738;
  F_L1 = 0.0113;
  F_a_m1 = 17.1621;
  F_d_m1 = 0.1456;
  F_L2 = 0.0084;
  F_d_m2 = 0.4408;
  F_L3 = 0.0085;
  F_d_m3 = 0.5637;
  F_a_p1 = 0.6188;
  F_d_p1 = 0.4167;
  F_a_p2 = 0.4375;
  F_d_p2 = 0.3257;
  F_a_p3 = 0.5914;
  F_d_p3 = 0.738;
  G_L1 = 0.0113;
  G_a_m1 = 17.1621;
  G_d_m1 = 0.1456;
  G_L2 = 0.0084;
  G_d_m2 = 0.4408;
  G_L3 = 0.0085;
  G_d_m3 = 0.5637;
  G_a_p1 = 0.6188;
  G_d_p1 = 0.4167;
  G_a_p2 = 0.4375;
  G_d_p2 = 0.3257;
  G_a_p3 = 0.5914;
  G_d_p3 = 0.738;
  H_L1 = 0.0113;
  H_a_m1 = 17.1621;
  H_d_m1 = 0.1456;
  H_L2 = 0.0084;
  H_d_m2 = 0.4408;
  H_L3 = 0.0085;
  H_d_m3 = 0.5637;
  H_a_p1 = 0.6188;
  H_d_p1 = 0.4167;
  H_a_p2 = 0.4375;
  H_d_p2 = 0.3257;
  H_a_p3 = 0.5914;
  H_d_p3 = 0.738;
  I_L1 = 0.0113;
  I_a_m1 = 17.1621;
  I_d_m1 = 0.1456;
  I_L2 = 0.0084;
  I_d_m2 = 0.4408;
  I_L3 = 0.0085;
  I_d_m3 = 0.5637;
  I_a_p1 = 0.6188;
  I_d_p1 = 0.4167;
  I_a_p2 = 0.4375;
  I_d_p2 = 0.3257;
  I_a_p3 = 0.5914;
  I_d_p3 = 0.738;
  J_L1 = 0.0113;
  J_a_m1 = 17.1621;
  J_d_m1 = 0.1456;
  J_L2 = 0.0084;
  J_d_m2 = 0.4408;
  J_L3 = 0.0085;
  J_d_m3 = 0.5637;
  J_a_p1 = 0.6188;
  J_d_p1 = 0.4167;
  J_a_p2 = 0.4375;
  J_d_p2 = 0.3257;
  J_a_p3 = 0.5914;
  J_d_p3 = 0.738;

  // Assignment rules:
  A_generalized_hill1 := A_Vm_A1*(A_K_A1*p_c1^A_H1/(A_K_A1 + p_c1^A_H1)) + A_Vm_R1*(A_K_R1/(A_K_R1 + p_c1^A_H1));
  A_generalized_hill2 := A_Vm_A2*(A_K_A2*A_p2^A_H2/(A_K_A2 + A_p2^A_H2)) + A_Vm_R2*(A_K_R2/(A_K_R2 + A_p2^A_H2));
  A_generalized_hill3 := A_Vm_A1*(A_K_A1*p_c1^A_H1/(A_K_A1 + p_c1^A_H1)) + A_Vm_R1*(A_K_R1/(A_K_R1 + p_c1^A_H1));
  B_generalized_hill1 := B_Vm_A1*(B_K_A1*p_c2^B_H1/(B_K_A1 + p_c2^B_H1)) + B_Vm_R1*(B_K_R1/(B_K_R1 + p_c2^B_H1));
  B_generalized_hill2 := B_Vm_A2*(B_K_A2*B_p2^B_H2/(B_K_A2 + B_p2^B_H2)) + B_Vm_R2*(B_K_R2/(B_K_R2 + B_p2^B_H2));
  B_generalized_hill3 := B_Vm_A1*(B_K_A1*p_c2^B_H1/(B_K_A1 + p_c2^B_H1)) + B_Vm_R1*(B_K_R1/(B_K_R1 + p_c2^B_H1));
  C_generalized_hill1 := C_Vm_A1*(C_K_A1*p_c3^C_H1/(C_K_A1 + p_c3^C_H1)) + C_Vm_R1*(C_K_R1/(C_K_R1 + p_c3^C_H1));
  C_generalized_hill2 := C_Vm_A2*(C_K_A2*C_p2^C_H2/(C_K_A2 + C_p2^C_H2)) + C_Vm_R2*(C_K_R2/(C_K_R2 + C_p2^C_H2));
  C_generalized_hill3 := C_Vm_A1*(C_K_A1*p_c3^C_H1/(C_K_A1 + p_c3^C_H1)) + C_Vm_R1*(C_K_R1/(C_K_R1 + p_c3^C_H1));
  D_generalized_hill1 := D_Vm_A1*(D_K_A1*p_c4^D_H1/(D_K_A1 + p_c4^D_H1)) + D_Vm_R1*(D_K_R1/(D_K_R1 + p_c4^D_H1));
  D_generalized_hill2 := D_Vm_A2*(D_K_A2*D_p2^D_H2/(D_K_A2 + D_p2^D_H2)) + D_Vm_R2*(D_K_R2/(D_K_R2 + D_p2^D_H2));
  D_generalized_hill3 := D_Vm_A1*(D_K_A1*p_c4^D_H1/(D_K_A1 + p_c4^D_H1)) + D_Vm_R1*(D_K_R1/(D_K_R1 + p_c4^D_H1));
  E_generalized_hill1 := E_Vm_A1*(E_K_A1*p_c5^E_H1/(E_K_A1 + p_c5^E_H1)) + E_Vm_R1*(E_K_R1/(E_K_R1 + p_c5^E_H1));
  E_generalized_hill2 := E_Vm_A2*(E_K_A2*E_p2^E_H2/(E_K_A2 + E_p2^E_H2)) + E_Vm_R2*(E_K_R2/(E_K_R2 + E_p2^E_H2));
  E_generalized_hill3 := E_Vm_A1*(E_K_A1*p_c5^E_H1/(E_K_A1 + p_c5^E_H1)) + E_Vm_R1*(E_K_R1/(E_K_R1 + p_c5^E_H1));
  F_generalized_hill1 := F_Vm_A1*(F_K_A1*p_c6^F_H1/(F_K_A1 + p_c6^F_H1)) + F_Vm_R1*(F_K_R1/(F_K_R1 + p_c6^F_H1));
  F_generalized_hill2 := F_Vm_A2*(F_K_A2*F_p2^F_H2/(F_K_A2 + F_p2^F_H2)) + F_Vm_R2*(F_K_R2/(F_K_R2 + F_p2^F_H2));
  F_generalized_hill3 := F_Vm_A1*(F_K_A1*p_c6^F_H1/(F_K_A1 + p_c6^F_H1)) + F_Vm_R1*(F_K_R1/(F_K_R1 + p_c6^F_H1));
  G_generalized_hill1 := G_Vm_A1*(G_K_A1*p_c7^G_H1/(G_K_A1 + p_c7^G_H1)) + G_Vm_R1*(G_K_R1/(G_K_R1 + p_c7^G_H1));
  G_generalized_hill2 := G_Vm_A2*(G_K_A2*G_p2^G_H2/(G_K_A2 + G_p2^G_H2)) + G_Vm_R2*(G_K_R2/(G_K_R2 + G_p2^G_H2));
  G_generalized_hill3 := G_Vm_A1*(G_K_A1*p_c7^G_H1/(G_K_A1 + p_c7^G_H1)) + G_Vm_R1*(G_K_R1/(G_K_R1 + p_c7^G_H1));
  H_generalized_hill1 := H_Vm_A1*(H_K_A1*p_c8^H_H1/(H_K_A1 + p_c8^H_H1)) + H_Vm_R1*(H_K_R1/(H_K_R1 + p_c8^H_H1));
  H_generalized_hill2 := H_Vm_A2*(H_K_A2*H_p2^H_H2/(H_K_A2 + H_p2^H_H2)) + H_Vm_R2*(H_K_R2/(H_K_R2 + H_p2^H_H2));
  H_generalized_hill3 := H_Vm_A1*(H_K_A1*p_c8^H_H1/(H_K_A1 + p_c8^H_H1)) + H_Vm_R1*(H_K_R1/(H_K_R1 + p_c8^H_H1));
  I_generalized_hill1 := I_Vm_A1*(I_K_A1*p_c9^I_H1/(I_K_A1 + p_c9^I_H1)) + I_Vm_R1*(I_K_R1/(I_K_R1 + p_c9^I_H1));
  I_generalized_hill2 := I_Vm_A2*(I_K_A2*I_p2^I_H2/(I_K_A2 + I_p2^I_H2)) + I_Vm_R2*(I_K_R2/(I_K_R2 + I_p2^I_H2));
  I_generalized_hill3 := I_Vm_A1*(I_K_A1*p_c9^I_H1/(I_K_A1 + p_c9^I_H1)) + I_Vm_R1*(I_K_R1/(I_K_R1 + p_c9^I_H1));
  J_generalized_hill1 := J_Vm_A1*(J_K_A1*J_p_input^J_H1/(J_K_A1 + J_p_input^J_H1)) + J_Vm_R1*(J_K_R1/(J_K_R1 + J_p_input^J_H1));
  J_generalized_hill2 := J_Vm_A2*(J_K_A2*J_p2^J_H2/(J_K_A2 + J_p2^J_H2)) + J_Vm_R2*(J_K_R2/(J_K_R2 + J_p2^J_H2));
  J_generalized_hill3 := J_Vm_A1*(J_K_A1*J_p_input^J_H1/(J_K_A1 + J_p_input^J_H1)) + J_Vm_R1*(J_K_R1/(J_K_R1 + J_p_input^J_H1));

  // Reactions:
  A_ts1: $A_N => A_m1; A_L1 + A_a_m1 - A_d_m1*A_m1;
  A_ts2: $A_N => A_m2; A_L2 + A_generalized_hill1 - A_d_m2*A_m2;
  A_ts3: $A_N => A_m3; A_L3 + A_generalized_hill2*A_generalized_hill3 - A_d_m3*A_m3;
  A_tl1: $A_AA => p_c1; A_a_p1*A_m1 - A_d_p1*p_c1;  // modifiers: A_m1
  A_tl2: $A_AA => A_p2; A_a_p2*A_m2 - A_d_p2*A_p2;  // modifiers: A_m2
  A_tl3: $A_AA => A_p_output; A_a_p3*A_m3 - A_d_p3*A_p_output;  // modifiers: A_m3
  B_ts1: $B_N => B_m1; B_L1 + B_a_m1 - B_d_m1*B_m1;
  B_ts2: $B_N => B_m2; B_L2 + B_generalized_hill1 - B_d_m2*B_m2;
  B_ts3: $B_N => B_m3; B_L3 + B_generalized_hill2*B_generalized_hill3 - B_d_m3*B_m3;
  B_tl1: $B_AA => p_c2; B_a_p1*B_m1 - B_d_p1*p_c2;  // modifiers: B_m1
  B_tl2: $B_AA => B_p2; B_a_p2*B_m2 - B_d_p2*B_p2;  // modifiers: B_m2
  B_tl3: $B_AA => p_c1; B_a_p3*B_m3 - B_d_p3*p_c1;  // modifiers: B_m3
  C_ts1: $C_N => C_m1; C_L1 + C_a_m1 - C_d_m1*C_m1;
  C_ts2: $C_N => C_m2; C_L2 + C_generalized_hill1 - C_d_m2*C_m2;
  C_ts3: $C_N => C_m3; C_L3 + C_generalized_hill2*C_generalized_hill3 - C_d_m3*C_m3;
  C_tl1: $C_AA => p_c3; C_a_p1*C_m1 - C_d_p1*p_c3;  // modifiers: C_m1
  C_tl2: $C_AA => C_p2; C_a_p2*C_m2 - C_d_p2*C_p2;  // modifiers: C_m2
  C_tl3: $C_AA => p_c2; C_a_p3*C_m3 - C_d_p3*p_c2;  // modifiers: C_m3
  D_ts1: $D_N => D_m1; D_L1 + D_a_m1 - D_d_m1*D_m1;
  D_ts2: $D_N => D_m2; D_L2 + D_generalized_hill1 - D_d_m2*D_m2;
  D_ts3: $D_N => D_m3; D_L3 + D_generalized_hill2*D_generalized_hill3 - D_d_m3*D_m3;
  D_tl1: $D_AA => p_c4; D_a_p1*D_m1 - D_d_p1*p_c4;  // modifiers: D_m1
  D_tl2: $D_AA => D_p2; D_a_p2*D_m2 - D_d_p2*D_p2;  // modifiers: D_m2
  D_tl3: $D_AA => p_c3; D_a_p3*D_m3 - D_d_p3*p_c3;  // modifiers: D_m3
  E_ts1: $E_N => E_m1; E_L1 + E_a_m1 - E_d_m1*E_m1;
  E_ts2: $E_N => E_m2; E_L2 + E_generalized_hill1 - E_d_m2*E_m2;
  E_ts3: $E_N => E_m3; E_L3 + E_generalized_hill2*E_generalized_hill3 - E_d_m3*E_m3;
  E_tl1: $E_AA => p_c5; E_a_p1*E_m1 - E_d_p1*p_c5;  // modifiers: E_m1
  E_tl2: $E_AA => E_p2; E_a_p2*E_m2 - E_d_p2*E_p2;  // modifiers: E_m2
  E_tl3: $E_AA => p_c4; E_a_p3*E_m3 - E_d_p3*p_c4;  // modifiers: E_m3
  F_ts1: $F_N => F_m1; F_L1 + F_a_m1 - F_d_m1*F_m1;
  F_ts2: $F_N => F_m2; F_L2 + F_generalized_hill1 - F_d_m2*F_m2;
  F_ts3: $F_N => F_m3; F_L3 + F_generalized_hill2*F_generalized_hill3 - F_d_m3*F_m3;
  F_tl1: $F_AA => p_c6; F_a_p1*F_m1 - F_d_p1*p_c6;  // modifiers: F_m1
  F_tl2: $F_AA => F_p2; F_a_p2*F_m2 - F_d_p2*F_p2;  // modifiers: F_m2
  F_tl3: $F_AA => p_c5; F_a_p3*F_m3 - F_d_p3*p_c5;  // modifiers: F_m3
  G_ts1: $G_N => G_m1; G_L1 + G_a_m1 - G_d_m1*G_m1;
  G_ts2: $G_N => G_m2; G_L2 + G_generalized_hill1 - G_d_m2*G_m2;
  G_ts3: $G_N => G_m3; G_L3 + G_generalized_hill2*G_generalized_hill3 - G_d_m3*G_m3;
  G_tl1: $G_AA => p_c7; G_a_p1*G_m1 - G_d_p1*p_c7;  // modifiers: G_m1
  G_tl2: $G_AA => G_p2; G_a_p2*G_m2 - G_d_p2*G_p2;  // modifiers: G_m2
  G_tl3: $G_AA => p_c6; G_a_p3*G_m3 - G_d_p3*p_c6;  // modifiers: G_m3
  H_ts1: $H_N => H_m1; H_L1 + H_a_m1 - H_d_m1*H_m1;
  H_ts2: $H_N => H_m2; H_L2 + H_generalized_hill1 - H_d_m2*H_m2;
  H_ts3: $H_N => H_m3; H_L3 + H_generalized_hill2*H_generalized_hill3 - H_d_m3*H_m3;
  H_tl1: $H_AA => p_c8; H_a_p1*H_m1 - H_d_p1*p_c8;  // modifiers: H_m1
  H_tl2: $H_AA => H_p2; H_a_p2*H_m2 - H_d_p2*H_p2;  // modifiers: H_m2
  H_tl3: $H_AA => p_c7; H_a_p3*H_m3 - H_d_p3*p_c7;  // modifiers: H_m3
  I_ts1: $I_N => I_m1; I_L1 + I_a_m1 - I_d_m1*I_m1;
  I_ts2: $I_N => I_m2; I_L2 + I_generalized_hill1 - I_d_m2*I_m2;
  I_ts3: $I_N => I_m3; I_L3 + I_generalized_hill2*I_generalized_hill3 - I_d_m3*I_m3;
  I_tl1: $I_AA => p_c9; I_a_p1*I_m1 - I_d_p1*p_c9;  // modifiers: I_m1
  I_tl2: $I_AA => I_p2; I_a_p2*I_m2 - I_d_p2*I_p2;  // modifiers: I_m2
  I_tl3: $I_AA => p_c8; I_a_p3*I_m3 - I_d_p3*p_c8;  // modifiers: I_m3
  J_ts1: $J_N => J_m1; J_L1 + J_a_m1 - J_d_m1*J_m1;
  J_ts2: $J_N => J_m2; J_L2 + J_generalized_hill1 - J_d_m2*J_m2;
  J_ts3: $J_N => J_m3; J_L3 + J_generalized_hill2*J_generalized_hill3 - J_d_m3*J_m3;
  J_tl1: $J_AA => J_p_input; J_a_p1*J_m1 - J_d_p1*J_p_input;  // modifiers: J_m1
  J_tl2: $J_AA => J_p2; J_a_p2*J_m2 - J_d_p2*J_p2;  // modifiers: J_m2
  J_tl3: $J_AA => p_c9; J_a_p3*J_m3 - J_d_p3*p_c9;  // modifiers: J_m3
end
