// SBML level 3 version 1

model exp2()

  // Compartments:
  compartment default_compartment = 1;

  // Species:
  species INPUT in default_compartment = 1;
  species P1 in default_compartment = 0;
  species mRNA1 in default_compartment = 0;
  species P2 in default_compartment = 0;
  species mRNA2 in default_compartment = 0;
  species P3 in default_compartment = 0;
  species mRNA3 in default_compartment = 0;
  species P4 in default_compartment = 0;
  species mRNA4 in default_compartment = 0;
  species P5 in default_compartment = 0;
  species mRNA5 in default_compartment = 0;
  species P6 in default_compartment = 0;
  species mRNA6 in default_compartment = 0;
  species P7 in default_compartment = 0;
  species mRNA7 in default_compartment = 0;
  species P8 in default_compartment = 0;
  species mRNA8 in default_compartment = 0;

  // Parameters:
  d_protein1 = 0.01792734;
  d_mRNA1 = 0.7517551;
  L1 = 0.01853249;
  Vm1 = 0.8934383;
  a_protein1 = 0.1020053;
  H1 = 5.27586;
  K1_1 = 0.01245688;
  K2_1 = 0.01258954;
  K3_1 = 0.01722579;
  d_protein2 = 0.01773371;
  d_mRNA2 = 1.091816;
  L2 = 0.02327029;
  Vm2 = 1.177519;
  a_protein2 = 0.06786172;
  H2 = 6.081036;
  K1_2 = 0.01660711;
  K2_2 = 0.01266682;
  K3_2 = 0.01772746;
  d_protein3 = 0.01688584;
  d_mRNA3 = 0.8557967;
  L3 = 0.020509;
  Vm3 = 1.0144;
  a_protein3 = 0.07433376;
  H3 = 6.313265;
  K1_3 = 0.01360003;
  K2_3 = 0.01065417;
  K3_3 = 0.01807873;
  d_protein4 = 0.02105473;
  d_mRNA4 = 0.8476891;
  L4 = 0.01470513;
  Vm4 = 0.8898433;
  a_protein4 = 0.115264;
  H4 = 4.234185;
  K1_4 = 0.01575612;
  K2_4 = 0.01689295;
  K3_4 = 0.0223141;
  d_protein5 = 0.009746118;
  d_mRNA5 = 1.04451;
  L5 = 0.0161515;
  Vm5 = 0.7995789;
  a_protein5 = 0.1014114;
  H5 = 2.223276;
  K1_5 = 0.0119131;
  K2_5 = 0.01198607;
  K3_5 = 0.01315567;
  d_protein6 = 0.01524066;
  d_mRNA6 = 0.9497823;
  L6 = 0.0180394;
  Vm6 = 1.10477;
  a_protein6 = 0.04337308;
  H6 = 5.24563;
  K1_6 = 0.01933984;
  K2_6 = 0.01403518;
  K3_6 = 0.0194596;
  d_protein7 = 0.01590354;
  d_mRNA7 = 0.7929751;
  L7 = 0.01550813;
  Vm7 = 0.6575974;
  a_protein7 = 0.0677014;
  H7 = 3.994388;
  K1_7 = 0.0125023;
  K2_7 = 0.009856881;
  K3_7 = 0.01962563;
  d_protein8 = 0.01285122;
  d_mRNA8 = 0.7500246;
  L8 = 0.02522133;
  Vm8 = 1.082389;
  a_protein8 = 0.0918699;
  H8 = 4.693351;
  K1_8 = 0.01027777;
  K2_8 = 0.02180983;
  K3_8 = 0.01767475;

  // Reactions:
  J1: => mRNA1; L1 + Vm1*(K1_1*P8^H1/(1 + K1_1*P8^H1 + K2_1*P3^H1 + K1_1*K2_1*P8^H1*P3^H1)) - d_mRNA1*mRNA1;  // modifiers: P3, P8
  F1: => P1; a_protein1*mRNA1 - d_protein1*P1;  // modifiers: mRNA1
  J2: => mRNA2; L2 + Vm2*((K1_2*INPUT^H2 + K2_2*P7^H2 + K1_2*K3_2*INPUT^H2*P7^H2)/(1 + K1_2*INPUT^H2 + K2_2*P7^H2 + K1_2*K3_2*INPUT^H2*P7^H2)) - d_mRNA2*mRNA2;  // modifiers: INPUT, P7
  F2: => P2; a_protein2*mRNA2 - d_protein2*P2;  // modifiers: mRNA2
  J3: => mRNA3; L3 + Vm3*(1/(1 + K1_3*P5^H3 + K2_3*P7^H3 + K1_3*K3_3*P5^H3*P7^H3)) - d_mRNA3*mRNA3;  // modifiers: P5, P7
  F3: => P3; a_protein3*mRNA3 - d_protein3*P3;  // modifiers: mRNA3
  J4: => mRNA4; L4 + Vm4*(K1_4*P6^H4/(1 + K1_4*P6^H4 + K2_4*P2^H4 + K1_4*K2_4*P6^H4*P2^H4)) - d_mRNA4*mRNA4;  // modifiers: P2, P6
  F4: => P4; a_protein4*mRNA4 - d_protein4*P4;  // modifiers: mRNA4
  J5: => mRNA5; L5 + Vm5*(K1_5*P1^H5/(1 + K1_5*P1^H5)) - d_mRNA5*mRNA5;  // modifiers: P1
  F5: => P5; a_protein5*mRNA5 - d_protein5*P5;  // modifiers: mRNA5
  J6: => mRNA6; L6 + Vm6*(1/(1 + K1_6*P6^H6 + K2_6*P1^H6 + K1_6*K3_6*P6^H6*P1^H6)) - d_mRNA6*mRNA6;  // modifiers: P1, P6
  F6: => P6; a_protein6*mRNA6 - d_protein6*P6;  // modifiers: mRNA6
  J7: => mRNA7; L7 + Vm7*((K1_7*P2^H7 + K2_7*P4^H7 + K1_7*K3_7*P2^H7*P4^H7)/(1 + K1_7*P2^H7 + K2_7*P4^H7 + K1_7*K3_7*P2^H7*P4^H7)) - d_mRNA7*mRNA7;  // modifiers: P2, P4
  F7: => P7; a_protein7*mRNA7 - d_protein7*P7;  // modifiers: mRNA7
  J8: => mRNA8; L8 + Vm8*(1/(1 + K1_8*P7^H8 + K2_8*P8^H8 + K1_8*K3_8*P7^H8*P8^H8)) - d_mRNA8*mRNA8;  // modifiers: P8, P7
  F8: => P8; a_protein8*mRNA8 - d_protein8*P8;  // modifiers: mRNA8
end
